*Heading
** Job name: UNtension Model name: Model-1
** Generated by: Abaqus/CAE 2022
*Preprint, echo=NO, model=NO, history=NO, contact=NO
** ----------------------------------------------------------------
**
** PART INSTANCE: Part-1-1
**
*Node
      1,          10.,           2.,           1.
      2,          10.,           1.,           1.
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*Element, type=C3D8
 1, 10, 11, 14, 13,  1,  2,  5,  4
 2, 11, 12, 15, 14,  2,  3,  6,  5
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*Nset, nset=Part-1-1_allbody, generate
  1,  99,   1
*Elset, elset=Part-1-1_allbody, generate
  1,  40,   1
** Section: Section-1
*Solid Section, elset=Part-1-1_allbody, material=Material-1
,
*System
*Nset, nset=rightend, generate
 1,  9,  1
*Elset, elset=rightend, generate
 1,  4,  1
*Nset, nset=xsymm, generate
 91,  99,   1
*Elset, elset=xsymm, generate
 37,  40,   1
*Nset, nset=ysymm, generate
  3,  99,   3
*Elset, elset=ysymm, generate
  2,  40,   2
*Nset, nset=zsymm
  1,  2,  3, 10, 11, 12
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*Elset, elset=zsymm
  1,  2,  5,  6,  9, 10
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**
** MATERIALS
**
*Material, name=Material-1
*User Material, constants=8
2.50d0,8.95d-7,1.40d0,1.30d0,0.105d0,1.40d0,1.30d0,0.105d0
*depvar
4
** ----------------------------------------------------------------
**
** ------------------------------------------------------------
** STEP 1: Loading
** ------------------------------------------------------------
*Step, name=loading, nlgeom=YES, inc=1000
*Static, direct
0.01, 1.

** BOUNDARY CONDITIONS
** Right-end displacement: U1 = 10
*Boundary
rightend, 1, 1, 10.

** Symmetry boundary conditions
*Boundary
xsymm, XSYMM
*Boundary
ysymm, YSYMM
*Boundary
zsymm, ZSYMM

** OUTPUT REQUESTS
*Restart, write, frequency=0

** FIELD OUTPUT
*Output, field, variable=PRESELECT
*Element Output, directions=YES
SDV

** HISTORY OUTPUT
*Output, history, variable=PRESELECT

*End Step

** ------------------------------------------------------------
** STEP 2: Unloading
** ------------------------------------------------------------
*Step, name=unloading, nlgeom=YES, inc=1000
*Static, direct
0.01, 1.

** BOUNDARY CONDITIONS
** Unload the right end back to U1 = 0
*Boundary
rightend, 1, 1, 0.

** OUTPUT REQUESTS
*Restart, write, frequency=0

** FIELD OUTPUT
*Output, field, variable=PRESELECT
*Element Output, directions=YES
SDV

** HISTORY OUTPUT
*Output, history, variable=PRESELECT

*End Step
